// COMSOL Multiphysics 5.2.1.152 model "physical-model-test-0514-0521.mph"
// 20130507-锦爷试验验证模型-fasngtao-二维双管模型-5.0
// Outline of the model tree

Functions
  int1: Interpolation "冻结管温度"
    table = 
      {0, 273.15+5}
      {86400, 273.15+1.5}
      {86400*2, 273.15-15.5}
      {86400*3, 273.15-16.5}
      {86400*4, 273.15-25.5}
      {86400*5, 273.15-30}
    interp = piecewisecubic
    extrap = const
    argunit = s
    fununit = K
  int2: Interpolation "土的导热系数" | table = {{253.15, 2.28}, {263.15, 1.97}, {272.65, 1.76}, {283.15, 1.63}, {293.15, 1.29}}; extrap = interior; argunit = K; fununit = W/(m*K)
  an1: Analytic (disabled)
    expr = 1460[J/(kg*K)]+dH11*(1-flc2hs((T-271.95)[1/K],dA1[1/K]))*flc2hs((T-270.15)[1/K],dA2[1/K])+dH12*(1-flc2hs((T-270.15)[1/K],dA2[1/K]))*flc2hs((T-268.15)[1/K],dA3[1/K])+dH13*(1-flc2hs((T-268.15)[1/K],dA3[1/K]))*flc2hs((T-263.15)[1/K],dA4[1/K])+dH14*(1-flc2hs((T-263.15)[1/K],dA4[1/K]))*flc2hs((T-253.15)[1/K],dA5[1/K])+dH15*(1-flc2hs((T-253.15)[1/K],dA5[1/K]))
    args = T
  int3: Interpolation "temperature" | source = file; filename = E:\GITHUB\physical-model-test\temperature.txt; interp = linear; extrap = const; argunit = m; fununit = K
  int4: Interpolation "pressure" | source = file; filename = E:\GITHUB\physical-model-test\pressure.txt; argunit = m; fununit = Pa
  int5: Interpolation "speedu" | source = file; filename = E:\GITHUB\physical-model-test\speedu.txt; argunit = m; fununit = m/s
  int6: Interpolation "speedv" | source = file; filename = E:\GITHUB\physical-model-test\speedv.txt; argunit = m; fununit = m/s

Variables
  var1 "Variables 1"
    dA = 0.5[K]
    dH11 = (12176-1360)[J/(kg*K)]
    dH12 = (1420-1360)[J/(kg*K)]
    Mw12 = 0.029[kg/mol]
  var2 "Variables 2"
    cp1 = 1360[J/(kg*K)]+dH11*(1-flc2hs((T-272.65)[1/K],dA[1/K]))*flc2hs((T-267.65)[1/K],dA[1/K])+dH12*flc2hs((T-272.65)[1/K],dA[1/K])

Geometry
  geom1 "Geometry 1" (2D, length unit m)
    r1: Rectangle | size = {3, 2.5}
    c1: Circle "混凝土管" | pos = {1.19, 1.265}; r = 0.265
    c2: Circle "空气管" | pos = {1.810, 1.265}; r = 0.265
    c3: Circle "master1" | pos = {1.19-0.265+0.05, 1.265}; r = 0.02
    c4: Circle "master2" | pos = {1.19+0.265-0.05, 1.265}; r = 0.02
    c5: Circle "limiting" | pos = {1.19, 1.265-0.265+0.05}; r = 0.02
    sq2: Square "角钢1" | pos = {1.81-(sqrt(69775/2)+15)/1000, 1.265+(sqrt(69775/2)-15)/1000}; size = 0.03
    sq1: Square "角钢2" | pos = {1.81+(sqrt(69775/2)-15)/1000, 1.265+(sqrt(69775/2)-15)/1000}; size = 0.03
    int1: Intersection "交集 1" | input = c2, sq2; keep = on
    int2: Intersection "交集 2" | input = c2, sq1; keep = on
    del1: Delete "删除实体 1" | input = sq1, sq2
    fin: Finalize "Form Union"

Materials
  mat2: Common "Air" on domains 2-4
    def "Basic"
      relpermeability = 1
      relpermittivity = 1
      dynamicviscosity = eta(T[1/K])[Pa*s]
      ratioofspecificheat = 1.4
      electricconductivity = 0[S/m]
      heatcapacity = Cp(T[1/K])[J/(kg*K)]
      density = rho(pA[1/Pa],T[1/K])[kg/m^3]
      thermalconductivity = k(T[1/K])[W/(m*K)]
      soundspeed = cs(T[1/K])[m/s]
      eta: Piecewise | arg = T; extrap = constant; pieces = {200.0, 1600.0, -8.38278E-7+8.35717342E-8*T^1-7.69429583E-11*T^2+4.6437266E-14*T^3-1.06585607E-17*T^4}
      Cp: Piecewise | arg = T; extrap = constant; pieces = {200.0, 1600.0, 1047.63657-0.372589265*T^1+9.45304214E-4*T^2-6.02409443E-7*T^3+1.2858961E-10*T^4}
      rho: Analytic | expr = pA*0.02897/8.314/T; args = {pA, T}; dermethod = manual; argders = {{pA, d(pA*0.02897/8.314/T,pA)}, {T, d(pA*0.02897/8.314/T,T)}}
      k: Piecewise | arg = T; extrap = constant; pieces = {200.0, 1600.0, -0.00227583562+1.15480022E-4*T^1-7.90252856E-8*T^2+4.11702505E-11*T^3-7.43864331E-15*T^4}
      cs: Analytic | expr = sqrt(1.4*287*T); args = T; dermethod = manual; argders = {T, d(sqrt(1.4*287*T),T)}
  mat3: Common "混凝土" on domains 5
    def "Basic"
      density = 2344
      thermalconductivity = 1.835
      heatcapacity = 419.8
  mat4: Common "土" on domains 1
    def "Basic"
      density = 1660
      thermalconductivity = int2(T)
      heatcapacity = cp1
  mat5: Common "盐水固体" on domains 3, 4, 6-8
    def "Basic"
      density = 1318.7
      heatcapacity = 2763
      thermalconductivity = 1.977

Physics
  ht: HeatTransferInSolidsAndFluids "传热" on domains 1, 2, 5
    dependent variable T
    ShapeProperty.order_temperature = 1
    PhysicalModelProperty.dz = 1[m]
    solid1: SolidHeatTransferModel "固体 1" (default)
    fluid1: FluidHeatTransferModel "流体 1" on domains 2
    init1: init "初始值 1" (default) | Tinit = int3(x,y)
    ins1: ThermalInsulation "热绝缘" (default)
    temp1: TemperatureBoundary "温度 1" on boundaries 4-7, 11-14, 21-24, 27, 31 | T0 = int1(t)
    hf1: HeatFluxBoundary "热通量 1" on boundaries 3 | HeatFluxType = ConvectiveHeatFlux; h = 15; Text = 303.15[K]
    hf2: HeatFluxBoundary "热通量 2" on boundaries 1, 8 | HeatFluxType = ConvectiveHeatFlux; h = 5; Text = 303.15[K]
    temp2: TemperatureBoundary "温度 2" on boundaries 15, 16, 18, 19 | T0 = 14[degC]
  spf: LaminarFlow "层流" on domains 2
    dependent variable u = {u, v, w}
    PhysicalModelProperty.Compressibility = WeaklyCompressible
    PhysicalModelProperty.IncludeGravity = 1
    AdvancedSettingProperty.UsePseudoTime = 1
    fp1: FluidProperties "流体属性 1" (default)
    init1: init "初始值 1" (default) | u_init = {int5(x,y), int6(x,y), 0}; p_init = int4(x,y)
    wall1: Wall "壁 1" (default)
    grav1: Gravity "重力 1"
    prpc1: PressurePointConstraint "压力点约束 1" on points 23

Multiphysics
  nitf1: NonIsothermalFlow "非等温流 1" on all domains | Fluid_physics = spf; Heat_physics = ht

Mesh
  mesh1 "Mesh 1" (physics-controlled)
    size: MeshSizeDefault | table = cfd; hauto = 2

Studies
  std1 "Study 1"
    time: Transient "Time Dependent" | tlist = range(0,1,5); tunit = d

Datasets
  mesh1: Mesh "网格 1" | mesh = mesh1
  int3_ds1: Grid2D "二维格点 1"
    source = function
    function = int3
    par1 = x
    parmin1 = 0
    parmax1 = 3
    par2 = y
    parmin2 = 0
    parmax2 = 2.5
  int3_ds2: Grid2D "二维格点 2"
    source = function
    function = int3
    par1 = x
    parmin1 = 0
    parmax1 = 3
    par2 = y
    parmin2 = 0
    parmax2 = 2.5
  int3_ds3: Grid2D "二维格点 3"
    source = function
    function = int3
    par1 = x
    parmin1 = 0
    parmax1 = 3
    par2 = y
    parmin2 = 0
    parmax2 = 2.5
  int3_ds4: Grid2D "二维格点 4"
    source = function
    function = int3
    par1 = x
    parmin1 = 0
    parmax1 = 3
    par2 = y
    parmin2 = 0
    parmax2 = 2.5
  int3_ds5: Grid2D "二维格点 5"
    source = function
    function = int3
    par1 = x
    parmin1 = 0
    parmax1 = 3
    par2 = y
    parmin2 = 0
    parmax2 = 2.5
  int3_ds6: Grid2D "二维格点 6"
    source = function
    function = int3
    par1 = x
    parmin1 = 0
    parmax1 = 3
    par2 = y
    parmin2 = 0
    parmax2 = 2.5